*Heading
** Job name: 2D_SHEAR_FORCE_ELASTIC_elemSize_5_160x120mm_intp_2_DIRECT Model name: 2D_SHEAR_FORCE_ELASTIC
** Generated by: Abaqus/CAE 2017
*Preprint, echo=NO, model=NO, history=NO, contact=NO
**
** PARTS
**
*Part, name=rectangular
*End Part
**
**
** ASSEMBLY
**
*Assembly, name=Assembly
**
*Instance, name=rectangularInstance, part=rectangular
*Node
      1,           0.,           0.
      2,           5.,           0.
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*Element, type=CPS8
  1,    1,    2,   35,   34,  826,  827,  828,  829
  2,    2,    3,   36,   35,  830,  831,  832,  827
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*Nset, nset=_PickedSet2, internal, generate
    1,  2417,     1
*Elset, elset=_PickedSet2, internal, generate
   1,  768,    1
** Section: rectangularSection
*Solid Section, elset=_PickedSet2, material=Steel
1.,
*End Instance
**
*Nset, nset=x_end, instance=rectangularInstance
   33,   66,   99,  132,  165,  198
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*Elset, elset=x_end, instance=rectangularInstance, generate
  32,  768,   32
*Nset, nset=x_start, instance=rectangularInstance
    1,   34,   67,  100,  133,  166
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*Elset, elset=x_start, instance=rectangularInstance, generate
   1,  737,   32
*Nset, nset=y_end, instance=rectangularInstance
  793,  794,  795,  796,  797,  798
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*Elset, elset=y_end, instance=rectangularInstance, generate
 737,  768,    1
*Nset, nset=y_start, instance=rectangularInstance
   1,   2,   3,   4,   5,   6
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*Elset, elset=y_start, instance=rectangularInstance, generate
  1,  32,   1
*Elset, elset=__PickedSurf10_S2, internal, instance=rectangularInstance, generate
  32,  768,   32
*Surface, type=ELEMENT, name=_PickedSurf10, internal
__PickedSurf10_S2, S2
*End Assembly
**
** MATERIALS
**
*Material, name=Steel
*Density
 5e-09,
*Elastic
10000., 0.3
**
** BOUNDARY CONDITIONS
**
** Name: fix_x_end Type: Symmetry/Antisymmetry/Encastre
*Boundary
x_end, XSYMM
** Name: fix_x_start Type: Symmetry/Antisymmetry/Encastre
*Boundary
x_start, ZASYMM
** ----------------------------------------------------------------
**
** STEP: Load
**
*Step, name=Load, nlgeom=NO
Load.
*Static
1., 5., 1., 1.
**
** LOADS
**
** Name: load_x_end   Type: Surface traction
*Dsload, follower=NO, constant resultant=YES
_PickedSurf10, TRVEC, 500., 0., 1., 0.
**
** OUTPUT REQUESTS
**
*Restart, write, frequency=0
**
** FIELD OUTPUT: F-Output-1
**
*Output, field, variable=PRESELECT
**
** HISTORY OUTPUT: H-Output-1
**
*Output, history, variable=PRESELECT
*End Step
