*Heading
** Job name: 3D_SHEAR_FORCE_ELASTIC_elem_10_160x120x120mm_intp_2_DIRECT Model name: 3D_SHEAR_FORCE_ELASTIC
** Generated by: Abaqus/CAE 2017
*Preprint, echo=NO, model=NO, history=NO, contact=NO
**
** PARTS
**
*Part, name=rectangular
*End Part
**
**
** ASSEMBLY
**
*Assembly, name=Assembly
**
*Instance, name=rectangularInstance, part=rectangular
*Node
      1,         160.,         120.,         120.
      2,         160.,         110.,         120.
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*Element, type=C3D20
   1,   170,   171,   184,   183,     1,     2,    15,    14,  2877,  2876,  2875,  2874,  2878,  2879,  2880,
       2881,  2883,  2882,  2884,  2885
   2,   171,   172,   185,   184,     2,     3,    16,    15,  2888,  2887,  2886,  2876,  2889,  2890,  2891,
       2879,  2882,  2892,  2893,  2884
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*Nset, nset=_G2, internal, generate
     1,  10881,      1
*Elset, elset=_G2, internal, generate
    1,  2304,     1
** Section: rectangularSection
*Solid Section, elset=_G2, material=Steel
1.,
*End Instance
**
*Nset, nset=_G3, internal, instance=rectangularInstance
  2705,  2706,  2707,  2708,  2709,  2710
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*Elset, elset=_G3, internal, instance=rectangularInstance, generate
 2161,  2304,     1
*Nset, nset=_G4, internal, instance=rectangularInstance
  2705,  2706,  2707,  2708,  2709,  2710
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*Elset, elset=_G4, internal, instance=rectangularInstance, generate
 2161,  2304,     1
*Nset, nset=_G5, internal, instance=rectangularInstance
    1,    2,    3,    4,    5,    6
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*Elset, elset=_G5, internal, instance=rectangularInstance, generate
   1,  144,    1
*Nset, nset=_G6, internal, instance=rectangularInstance
   157,   158,   159,   160,   161,   162
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*Elset, elset=_G6, internal, instance=rectangularInstance
  133,  134,  135,  136,  137,  138
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*Elset, elset=__PickedSurf7_S2, internal, instance=rectangularInstance, generate
   1,  144,    1
*Surface, type=ELEMENT, name=_PickedSurf7, internal
__PickedSurf7_S2, S2
*End Assembly
**
** MATERIALS
**
*Material, name=Steel
*Density
 5e-09,
*Elastic
10000., 0.3
**
** BOUNDARY CONDITIONS
**
** Name: fix_x_end_x Type: Symmetry/Antisymmetry/Encastre
*Boundary
_G5, XSYMM
** Name: fix_x_start_x Type: Symmetry/Antisymmetry/Encastre
*Boundary
_G3, XSYMM
** Name: fix_x_start_y Type: Symmetry/Antisymmetry/Encastre
*Boundary
_G4, YSYMM
** Name: fix_z Type: Symmetry/Antisymmetry/Encastre
*Boundary
_G6, ZSYMM
** ----------------------------------------------------------------
**
** STEP: Load
**
*Step, name=Load, nlgeom=NO
Load.
*Static
1., 5., 1., 1.
**
** LOADS
**
** Name: load_x_end   Type: Surface traction
*Dsload, follower=NO, constant resultant=YES
_PickedSurf7, TRVEC, 500., 0., 1., 0.
**
** OUTPUT REQUESTS
**
*Restart, write, frequency=0
**
** FIELD OUTPUT: F-Output-1
**
*Output, field, variable=PRESELECT
**
** HISTORY OUTPUT: H-Output-1
**
*Output, history, variable=PRESELECT
*End Step
